<?xml version="1.0" encoding="UTF-8"?>
<channelml xmlns="http://morphml.org/channelml/schema"
    xmlns:xsi="http://www.w3.org/2001/XMLSchema-instance"
    xmlns:meta="http://morphml.org/metadata/schema"
    xsi:schemaLocation="http://morphml.org/channelml/schema  http://www.neuroml.org/NeuroMLValidator/NeuroMLFiles/Schemata/v1.8.1/Level2/ChannelML_v1.8.1.xsd"
    units="Physiological Units">

    <meta:notes>ChannelML file containing a single Channel description</meta:notes>

    <channel_type name="BGKA_CML" density="yes">

        <status value="stable">
            <meta:comment>Verified equivalence of NEURON and GENESIS mapping to orig NEURON impl from http://senselab.med.yale.edu/senselab/modeldb/ShowModel.asp?model=51781.</meta:comment>
            <meta:comment>Updated to post v1.7.3 new ChannelML format</meta:comment>
            <meta:contributor>
                <meta:name>Padraig Gleeson</meta:name>
            </meta:contributor>
        </status>

        <meta:notes>Specificatation in ChannelML of channel from Santhakumar et al 2005</meta:notes>

        <meta:authorList>
            <meta:modelAuthor>
                <meta:name>Vijayalakshmi Santhakumar</meta:name>
            </meta:modelAuthor>
			<meta:modelTranslator>
				<meta:name>Padraig Gleeson</meta:name>
				<meta:institution>UCL</meta:institution>
				<meta:email>p.gleeson - at - ucl.ac.uk</meta:email>
			</meta:modelTranslator>
        </meta:authorList>

        <meta:neuronDBref>
            <meta:modelName>K channels</meta:modelName>
            <meta:uri>http://senselab.med.yale.edu/senselab/NeuronDB/channelGene2.htm#table3</meta:uri>
        </meta:neuronDBref>

        <current_voltage_relation cond_law="ohmic" ion="k" default_gmax="12" default_erev="-90">
            <q10_settings q10_factor="3" experimental_temp="30"/>
            <gate name="n" instances="1">
                <closed_state id="n0"/>
                <open_state id="n" fraction="1"/>

                <transition name="alpha" from="n0" to="n" expr_form="generic" expr="(exp ( (1e-3*(-3)*(v-(-33.6))* 96480 ) / (8.315*(273.16+celsius))))" />
                <transition name="beta" from="n" to="n0" expr_form="generic" expr="(exp ( (1e-3*(-3)*(0.6)*(v-(-33.6)) * 96480 ) / (8.315*(273.16+celsius))))" />

                <time_course name="tau" from="n0" to="n" expr_form="generic" expr="beta/((0.02)*(1+alpha))" />
                <steady_state name="inf" from="n0" to="n" expr_form="generic" expr="1/(1+alpha)" />

            </gate>

            <gate name="l" instances="1">
                <closed_state id="l0"/>
                <open_state id="l" fraction="1"/>

                <transition name="alpha" from="l0" to="l" expr_form="generic" expr="(exp (1e-3*4*(v-(-83)) * 96480 /(8.315*(273.16+celsius))))" />
                <transition name="beta" from="l" to="l0" expr_form="generic" expr="(exp (1e-3*4*1*(v-(-83)) * 96480 /(8.315*(273.16+celsius))))" />

                <time_course name="tau" from="l0" to="l" expr_form="generic" expr="beta/((0.08)*(1+alpha))" />
                <steady_state name="inf" from="l0" to="l" expr_form="generic" expr="1/(1+alpha)" />

            </gate>
        </current_voltage_relation>

    </channel_type>
</channelml>
