<?xml version="1.0" encoding="UTF-8"?>
<channelml xmlns="http://morphml.org/channelml/schema" xmlns:xsi="http://www.w3.org/2001/XMLSchema-instance" xmlns:meta="http://morphml.org/metadata/schema" xsi:schemaLocation="http://morphml.org/channelml/schema  ../../Schemata/v1.3alpha/Level2/ChannelML_v1.3.xsd" units="Physiological Units">

    <meta:notes>ChannelML file describing a synaptic mechanism</meta:notes>

    <synapse_type name="GCGCSyn">

        <status value="stable">
            <meta:comment>Verified against Table 4 in Santhakumar et al 2005</meta:comment>
            <meta:contributor>
                <meta:name>Padraig Gleeson</meta:name>
            </meta:contributor>
        </status>

        <meta:notes>Simple example of a synaptic mechanism, which consists of a postsynaptic conductance which changes as
        double exponential function of time</meta:notes>

        <doub_exp_syn max_conductance="2.0E-6" rise_time="1.5" decay_time="5.5" reversal_potential="0"/>

    </synapse_type>

</channelml>
