<?xml version="1.0" encoding="UTF-8"?>
<channelml xmlns="http://morphml.org/channelml/schema"
           xmlns:xsi="http://www.w3.org/2001/XMLSchema-instance"
           xmlns:meta="http://morphml.org/metadata/schema"
           xsi:schemaLocation="http://morphml.org/channelml/schema  http://www.neuroml.org/NeuroMLValidator/NeuroMLFiles/Schemata/v1.8.1/Level2/ChannelML_v1.8.1.xsd"
           units="Physiological Units">

    <meta:notes>ChannelML file containing a single Channel description</meta:notes>

    <channel_type name="Nat_CML" density="yes">

        <status value="stable">
            <meta:comment>Verified equivalence of NEURON and GENESIS mapping to orig NEURON impl from http://senselab.med.yale.edu/senselab/modeldb/ShowModel.asp?model=51781.</meta:comment>
            <meta:comment>Updated to post v1.7.3 new ChannelML format</meta:comment>
            <meta:contributor>
                <meta:name>Padraig Gleeson</meta:name>
            </meta:contributor>
        </status>

        <meta:notes>Specificatation in ChannelML of channel from Santhakumar et al 2005</meta:notes>

        <meta:authorList>
			<meta:modelTranslator>
				<meta:name>Padraig Gleeson</meta:name>
				<meta:institution>UCL</meta:institution>
				<meta:email>p.gleeson - at - ucl.ac.uk</meta:email>
			</meta:modelTranslator>
        </meta:authorList>

        <meta:neuronDBref>
            <meta:modelName>Na channels</meta:modelName>
            <meta:uri>http://senselab.med.yale.edu/senselab/NeuronDB/channelGene2.htm#table2</meta:uri>
        </meta:neuronDBref>

        <current_voltage_relation cond_law="ohmic" ion="nat" default_gmax="120" default_erev="45">
            <q10_settings q10_factor="3" experimental_temp="6.3"/>
            <gate name="m" instances="3">
                <closed_state id="m0"/>
                <open_state id="m" fraction="1"/>

                <transition name="alpha" from="m0" to="m" expr_form="exp_linear" rate="1.5" scale="5" midpoint="-43" />
                <transition name="beta" from="m" to="m0" expr_form="exp_linear" rate="1.5" scale="-5" midpoint="-15" />

            </gate>

            <gate name="h" instances="1">
                <closed_state id="h0"/>
                <open_state id="h" fraction="1"/>

                <transition name="alpha" from="h0" to="h" expr_form="exponential" rate="0.23" scale="-20" midpoint="-65" />
                <transition name="beta" from="h" to="h0" expr_form="sigmoid" rate="3.33" scale="-10" midpoint="-12.5" />

            </gate>
        </current_voltage_relation>

        <!-- Adding table settings to get closer to original mod file impl -->
        <impl_prefs>
            <table_settings max_v="100" min_v="-100" table_divisions="200"/>
        </impl_prefs>

    </channel_type>
</channelml>
